*Heading
** Job name: Mesh_005 Model name: Model-1
** Generated by: Abaqus/CAE 2017
*Preprint, echo=NO, model=NO, history=NO, contact=NO
**
** PARTS
**
*Part, name=Blade
*Node
      1,           0., 0.0419850126, 0.0941395685
      2,  0.993093193, 0.0694102794, 0.0799999982
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*Element, type=C3D8R
 1,   9,  88, 407, 109,   1,  31, 388,  69
 2,  88,  87, 408, 407,  31,  32, 389, 388
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*Nset, nset=All, generate
   1,  615,    1
*Elset, elset=All, generate
   1,  320,    1
*Nset, nset=BC
   1,   5,   8,   9,  12,  13,  20,  23,  25,  69, 109, 112, 113, 266, 269
*Elset, elset=BC
   1,  21,  79,  80, 121, 141, 199, 200
*Elset, elset=_Wind_S6, internal
 161, 162, 163, 164, 165, 166
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*Elset, elset=_Wind_S2, internal, generate
 201,  240,    1
*Elset, elset=_Wind_S3, internal, generate
 121,  160,    1
*Surface, type=ELEMENT, name=Wind
_Wind_S6, S6
_Wind_S2, S2
_Wind_S3, S3
** Section: Steel
*Solid Section, elset=All, material=Steel
,
*End Part
**
**
** ASSEMBLY
**
*Assembly, name=Assembly
**
*Instance, name=Blade-1, part=Blade
*End Instance
**
*End Assembly
**
** MATERIALS
**
*Material, name=Steel
*Density
1300.,
*Elastic
 5e+10, 0.3
**
** BOUNDARY CONDITIONS
**
** Name: BC Type: Displacement/Rotation
*Boundary
Blade-1.BC, 1, 1
Blade-1.BC, 2, 2
Blade-1.BC, 3, 3
Blade-1.BC, 4, 4
Blade-1.BC, 5, 5
Blade-1.BC, 6, 6
** ----------------------------------------------------------------
**
** STEP: Step-1
**
*Step, name=Step-1, nlgeom=NO, inc=10000
*Static
1., 1., 1e-05, 1.
**
** LOADS
**
** Name: G   Type: Gravity
*Dload
, GRAV, 9.81, 0., 0., -1.
** Name: Wind   Type: Pressure
*Dsload
Blade-1.Wind, P, 1000.
**
** OUTPUT REQUESTS
**
*Restart, write, frequency=0
**
** FIELD OUTPUT: F-Output-1
**
*Output, field, variable=PRESELECT
**
** HISTORY OUTPUT: H-Output-1
**
*Output, history, variable=PRESELECT
*End Step
